<?xml version="1.0"?>

<!--
Propeller specs for Pipistrel Virus SW 912 ULS
  dia.:       67 in
  gearratio:  2.43:1

-->

<propeller name="prop">
  <ixx>   1.87 </ixx>
  <diameter unit="IN">  67.0 </diameter>
  <numblades> 2 </numblades>
  <gearratio>  2.43 </gearratio>
  <p_factor>   5.29 </p_factor>
  <minpitch> 12 </minpitch>
  <maxpitch> 45 </maxpitch>
  <minrpm>   2028 </minrpm>
  <maxrpm>   2400 </maxrpm>
  <constspeed> 1 </constspeed>

 <!-- thrust coefficient as a function of advance ratio and blade angle -->
  <table name="C_THRUST" type="internal">
      <tableData>
                -10        0         15        25        35        45        55        65       90
      -0.2      -0.0276    0.0155    0.0565    0.0692    0.0763    0.0806    0.0742    0.0636   0.0000
       0.0      -0.0410    0.0000    0.0565    0.0692    0.0763    0.0813    0.0760    0.0636   0.0000
       0.2      -0.0460   -0.0141    0.0488    0.0678    0.0752    0.0813    0.0760    0.0636   0.0000
       0.4      -0.0460   -0.0328    0.0367    0.0672    0.0738    0.0806    0.0760    0.0636   0.0000
       0.6      -0.0460   -0.0460    0.0194    0.0604    0.0707    0.0785    0.0749    0.0636   0.0000
       0.8      -0.0460   -0.0460    0.0011    0.0452    0.0686    0.0756    0.0749    0.0636   0.0000
       1.0      -0.0460   -0.0460   -0.0184    0.0276    0.0657    0.0717    0.0742    0.0636   0.0000
       1.2      -0.0460   -0.0460   -0.0378    0.0085    0.0540    0.0692    0.0742    0.0636   0.0000
       1.4      -0.0460   -0.0460   -0.0460   -0.0124    0.0389    0.0682    0.0728    0.0636   0.0000
       1.6      -0.0460   -0.0460   -0.0460   -0.0314    0.0212    0.0657    0.0714    0.0636   0.0000
       1.8      -0.0460   -0.0460   -0.0460   -0.0460    0.0036    0.0565    0.0692    0.0636   0.0000
       2.0      -0.0460   -0.0460   -0.0460   -0.0460   -0.0141    0.0441    0.0690    0.0636   0.0000
       2.2      -0.0460   -0.0460   -0.0460   -0.0460   -0.0318    0.0318    0.0678    0.0636   0.0000
       2.4      -0.0460   -0.0460   -0.0460   -0.0460   -0.0460    0.0170    0.0554    0.0636   0.0000
       2.6      -0.0460   -0.0460   -0.0460   -0.0460   -0.0460    0.0021    0.0350    0.0565   0.0000
       2.8      -0.0460   -0.0460   -0.0460   -0.0460   -0.0460   -0.0127    0.0230    0.0460   0.0000
       3.0      -0.0460   -0.0460   -0.0460   -0.0460   -0.0460   -0.0276    0.0120    0.0353   0.0000
       3.2      -0.0460   -0.0460   -0.0460   -0.0460   -0.0460   -0.0424    0.0011    0.0248   0.0000
       3.4      -0.0460   -0.0460   -0.0460   -0.0460   -0.0460   -0.0460   -0.0099    0.0141   0.0000
       3.6      -0.0460   -0.0460   -0.0460   -0.0460   -0.0460   -0.0460   -0.0209    0.0036   0.0000
       3.8      -0.0460   -0.0460   -0.0460   -0.0460   -0.0460   -0.0460   -0.0318   -0.0071   0.0000
       4.0      -0.0460   -0.0460   -0.0460   -0.0460   -0.0460   -0.0460   -0.0427   -0.0177   0.0000
       6.0      -0.0460   -0.0460   -0.0460   -0.0460   -0.0460   -0.0460   -0.0460   -0.0460   0.0000
      </tableData>
  </table>

 <!-- power coefficient as a function of advance ratio and blade angle -->
  <table name="C_POWER" type="internal">
     <tableData>
               -10        0        15        25        35        45        55        65       90
      -0.2      0.0041   0.0081    0.0283    0.0643    0.1109    0.1577    0.1820    0.2014   0.2014
       0.0      0.0162   0.0041    0.0243    0.0599    0.1060    0.1577    0.1827    0.2014   0.2014
       0.2      0.0230   0.0065    0.0235    0.0558    0.1014    0.1577    0.1827    0.2014   0.2014
       0.4      0.0311   0.0141    0.0202    0.0514    0.0963    0.1577    0.1827    0.2014   0.2014
       0.6      0.0381   0.0214    0.0133    0.0478    0.0903    0.1545    0.1820    0.2014   0.2014
       0.8      0.0449   0.0287    0.0041    0.0405    0.0849    0.1475    0.1820    0.2014   0.2014
       1.0      0.0517   0.0357    0.0041    0.0284    0.0801    0.1400    0.1812    0.2014   0.2014
       1.2      0.0587   0.0285   -0.0133    0.0109    0.0708    0.1342    0.1800    0.2014   0.2014
       1.4      0.0655   0.0493   -0.0201   -0.0081    0.0546    0.1322    0.1778    0.2014   0.2014
       1.6      0.0723   0.0563   -0.0235   -0.0243    0.0345    0.1286    0.1740    0.1941   0.2014
       1.8      0.0793   0.0631   -0.0243   -0.0405    0.0101    0.1140    0.1686    0.1900   0.2014
       2.0      0.0861   0.0699   -0.0311   -0.0565   -0.0121    0.0970    0.1606    0.1861   0.2014
       2.2      0.0929   0.0769   -0.0381   -0.0728   -0.0364    0.0788    0.1558    0.1778   0.2014
       2.4      0.1000   0.0837   -0.0449   -0.0890   -0.0607    0.0563    0.1511    0.1740   0.2014
       2.6      0.1067   0.0905   -0.0517   -0.1051   -0.0769    0.0235    0.1475    0.1679   0.2014
       2.8      0.1135   0.0975   -0.0587   -0.1213   -0.0922   -0.0080    0.1444    0.1657   0.2014
       3.0      0.1206   0.1043   -0.0655   -0.1376   -0.1092   -0.0364    0.1395    0.1657   0.2014
       3.2      0.1274   0.1111   -0.0723   -0.1536   -0.1254   -0.0648    0.1305    0.1618   0.2014
       3.4      0.1342   0.1182   -0.0793   -0.1698   -0.1414   -0.0929    0.1012    0.1577   0.2014
       3.6      0.1412   0.1249   -0.0861   -0.1861   -0.1577   -0.1213    0.0711    0.1536   0.2014
       3.8      0.1480   0.1317   -0.0929   -0.2014   -0.1740   -0.1497    0.0395    0.1487   0.2014
       4.0      0.1548   0.1388   -0.1000   -0.2014   -0.2014   -0.1778    0.0080    0.1376   0.2014
       6.0      0.2014   0.2014   -0.2014   -0.2014   -0.2014   -0.2014   -0.2014   -0.1213   0.2014
     </tableData>
  </table>

<!-- thrust effects of helical tip Mach -->
<table name="CT_MACH" type="internal">
  <tableData>
    0.85   1.0
    1.05   0.8
  </tableData>
</table>

<!-- power-required effects of helical tip Mach -->
<table name="CP_MACH" type="internal">
  <tableData>
    0.85   1.0
    1.05   1.8
    2.00   1.4
  </tableData>
</table>

</propeller>
