<?xml version="1.0"?>
<?xml-stylesheet type="text/xsl" href="http://jsbsim.sourceforge.net/JSBSim.xsl"?>
<fdm_config name="virus-sw" version="2.0" release="ALPHA"
  xmlns:xsi="http://www.w3.org/2001/XMLSchema-instance"
  xsi:noNamespaceSchemaLocation="http://jsbsim.sourceforge.net/JSBSim.xsd">

<fileheader>
  <author> Nick Reimer </author>
  <filecreationdate>2015-01-01</filecreationdate>
  <version>$Revision: 1.20 $</version>
  <description> Models a Pipistrel Virus SW 100. </description>
</fileheader>

<!--
Virus SW specs

Sizes
  wing span:    35.13 ft
  lenght:       21.33 ft
  height:        6.07 ft
  wing area:    96.6 ft2
  rudder area:  11.8 ft2
  tail area:    11.6 ft2
  aspect ratio: 11.3
  wing incidence angle: 2.8?

  My estimates. math could make these more accurate:
  horizontal tail arm: 14.72 ft
  vertical tail arm:   14.34 ft
  wing chord:            2.7 ft

Weights
  empty weight:         637 lbs
  MTOW:                 1322 lbs
  fuel tanks capacity:  2 x 13.2 gal
  useful fuel:          2 x 12.4 gal
  baggage weights with parachute fitted: 45 pounds

Performance
  stall with flaps:      35 knots
  stall without flaps:   43 knots
  cruising speed:        147 knots
  max. horizontal speed: 153 knots
  VNE:                   163 knots
  max speed with airbrakes:        111 knots
  max speed with flaps:            70 knots
  turbulance penetration speed Vb: 135 knots
  best climb speed:                80 knots
  max climb rate:                  1653 fpm
  best glide ratio:                64 knots
  best glide:                      1:15
  take off run:                    311 feet
  take off over 15 m obstacle:     575 feet
  service ceiling:                 22300 feet
  45?-45? roll time:               1.6 sec
  fuel consum. at cruis. speed:    4.7 gph
  endurance:                       5.3 hours
  range distance:                  783 nm
  max load factor permitted ( x 1.8): +4g -2g
-->

<metrics>
   <wingarea  unit="FT2">   96.60 </wingarea>
   <wingspan  unit="FT" >   35.13 </wingspan>
   <wing_incidence>          2.80 </wing_incidence>
   <chord     unit="FT" >    2.75 </chord>
   <htailarea unit="FT2">   11.60 </htailarea>
   <htailarm  unit="FT" >   14.72 </htailarm>
   <vtailarea unit="FT2">   11.80 </vtailarea>
   <vtailarm  unit="FT" >   14.34 </vtailarm>
   <location name="AERORP" unit="IN">
    <x>   5.00 </x>
    <y>   0.00 </y>
    <z>  16.14 </z>
  </location>
  <location name="EYEPOINT" unit="IN">
    <x>  33.27 </x>
    <y> -18.00 </y>
    <z>  34.00 </z>
  </location>
  <location name="VRP" unit="IN">
    <x>0</x>
    <y>0</y>
    <z>0</z>
  </location>
</metrics>

<mass_balance>
   <ixx unit="SLUG*FT2">       706 </ixx>
   <iyy unit="SLUG*FT2">       245 </iyy>
   <izz unit="SLUG*FT2">       871 </izz>
   <emptywt unit="LBS" >       637 </emptywt>
   <location name="CG" unit="IN">
    <x>   0.00 </x>
    <y>   0.00 </y>
    <z>   0.00 </z>
  </location>
  <pointmass name="Payload">
    <description> 581 LBS + full (104 LBS) fuel should bring model up to entered max weight</description>
    <weight unit="LBS">    290.3 </weight>
    <location name="POINTMASS" unit="IN">
      <x>   0.00 </x>
      <y>   0.00 </y>
      <z>   0.00 </z>
    </location>
  </pointmass>
</mass_balance>

<ground_reactions>

  <contact type="BOGEY" name="LEFT_MAIN">
  <location unit="IN">
    <x>  10.75 </x>
    <y> -37.95 </y>
    <z> -43.78 </z>
  </location>
  <static_friction>  0.80 </static_friction>
  <dynamic_friction> 0.50 </dynamic_friction>
  <rolling_friction> 0.02 </rolling_friction>
  <spring_coeff unit="LBS/FT">       1323.00 </spring_coeff>
  <damping_coeff unit="LBS/FT/SEC">   661.50 </damping_coeff>
  <max_steer unit="DEG">0</max_steer>
  <brake_group>LEFT</brake_group>
  <retractable>0</retractable>
  </contact>

  <contact type="BOGEY" name="RIGHT_MAIN">
  <location unit="IN">
    <x>  10.75 </x>
    <y>  37.95 </y>
    <z> -43.78 </z>
  </location>
  <static_friction>  0.80 </static_friction>
  <dynamic_friction> 0.50 </dynamic_friction>
  <rolling_friction> 0.02 </rolling_friction>
  <spring_coeff unit="LBS/FT">       1323.00 </spring_coeff>
  <damping_coeff unit="LBS/FT/SEC">   661.50 </damping_coeff>
  <max_steer unit="DEG">0</max_steer>
  <brake_group>RIGHT</brake_group>
  <retractable>0</retractable>
  </contact>

  <contact type="BOGEY" name="NOSE">
  <location unit="IN">
    <x> -47.27 </x>
    <y>   0.00 </y>
    <z> -41.71 </z>
  </location>
  <static_friction>  0.90 </static_friction>
  <dynamic_friction> 0.70 </dynamic_friction>
  <rolling_friction> 0.02 </rolling_friction>
  <spring_coeff unit="LBS/FT">       1396.90 </spring_coeff>
  <damping_coeff unit="LBS/FT/SEC">   661.50 </damping_coeff>
  <max_steer unit="DEG"> 15.00 </max_steer>
  <brake_group>NONE</brake_group>
  <retractable>0</retractable>
  </contact>

  <contact type="STRUCTURE" name="LEFT_WING">
    <location unit="IN">
    <x>  11.81 </x>
    <y>-196.06 </y>
    <z>  23.62 </z>
    </location>
    <static_friction>  1.00 </static_friction>
    <dynamic_friction> 1.00 </dynamic_friction>
    <spring_coeff unit="LBS/FT">               1323.00 </spring_coeff>
    <damping_coeff unit="LBS/FT/SEC">           100.00 </damping_coeff>
    <damping_coeff_rebound unit="LBS/FT/SEC">   221.00 </damping_coeff_rebound>
  </contact>

  <contact type="STRUCTURE" name="RIGHT_WING">
    <location unit="IN">
    <x>  11.81 </x>
    <y> 196.06 </y>
    <z>  23.62 </z>
    </location>
    <static_friction>  1.00 </static_friction>
    <dynamic_friction> 1.00 </dynamic_friction>
    <spring_coeff unit="LBS/FT">               1323.00 </spring_coeff>
    <damping_coeff unit="LBS/FT/SEC">           100.00 </damping_coeff>
    <damping_coeff_rebound unit="LBS/FT/SEC">   221.00 </damping_coeff_rebound>
  </contact>

  <contact type="STRUCTURE" name="TAIL">
    <location unit="IN">
    <x>  165.354 </x>
    <y>    0.00  </y>
    <z>  -17.323 </z>
    </location>
    <static_friction>  1.00 </static_friction>
    <dynamic_friction> 1.00 </dynamic_friction>
    <spring_coeff unit="LBS/FT">               1323.00 </spring_coeff>
    <damping_coeff unit="LBS/FT/SEC">           100.00 </damping_coeff>
    <damping_coeff_rebound unit="LBS/FT/SEC">   221.00 </damping_coeff_rebound>
  </contact>

</ground_reactions>

<propulsion>

  <engine file="eng_rotax912uls">
    <location unit="IN">
      <x> -81.00 </x>
      <y>   0.00 </y>
      <z> -11.00 </z>
    </location>
    <orient unit="DEG">
      <pitch> 0.00 </pitch>
      <roll>  0.00 </roll>
      <yaw>   0.00 </yaw>
    </orient>
    <feed>0</feed>
    <thruster file="prop_67in">
    <sense> 1 </sense>
    <location unit="IN">
      <x> -81.00 </x>
      <y>   0.00 </y>
      <z> -11.00 </z>
    </location>
    <orient unit="DEG">
      <pitch> 0.00 </pitch>
      <roll>  0.00 </roll>
      <yaw>   0.00 </yaw>
    </orient>
    </thruster>
  </engine>

  <tank type="FUEL" number="0">
    <location unit="IN">
      <x>   5.84 </x>
      <y> -30.00 </y>
      <z>  18.70 </z>
    </location>
    <capacity unit="LBS">  86.95 </capacity>
    <contents unit="LBS">  40.00 </contents>
  </tank>

  <tank type="FUEL" number="1">
    <location unit="IN">
      <x>   5.84 </x>
      <y>  30.00 </y>
      <z>  18.70 </z>
    </location>
    <capacity unit="LBS">  86.95 </capacity>
    <contents unit="LBS">  40.00 </contents>
  </tank>

</propulsion>

<flight_control name="FCS: virus-sw">

  <channel name="Pitch">

  <summer name="Pitch Trim Sum">
      <input>fcs/elevator-cmd-norm</input>
      <input>fcs/pitch-trim-cmd-norm</input>
      <clipto>
        <min> -1 </min>
        <max>  1 </max>
      </clipto>
  </summer>

  <aerosurface_scale name="Elevator Control">
      <input>fcs/pitch-trim-sum</input>
      <range>
        <min> -0.35 </min>
        <max>  0.35 </max>
      </range>
      <output>fcs/elevator-pos-rad</output>
  </aerosurface_scale>

  <aerosurface_scale name="elevator normalization">
      <input>fcs/elevator-pos-rad</input>
      <domain>
        <min> -0.35 </min>
        <max>  0.35 </max>
      </domain>
      <range>
        <min> -1 </min>
        <max>  1 </max>
      </range>
      <output>fcs/elevator-pos-norm</output>
  </aerosurface_scale>

  </channel>

  <channel name="Roll">

  <summer name="Roll Trim Sum">
      <input>fcs/aileron-cmd-norm</input>
      <input>fcs/roll-trim-cmd-norm</input>
      <clipto>
        <min> -1 </min>
        <max>  1 </max>
      </clipto>
  </summer>

  <aerosurface_scale name="Left Aileron Control">
      <input>fcs/roll-trim-sum</input>
      <range>
        <min> -0.35 </min>
        <max>  0.35 </max>
      </range>
      <output>fcs/left-aileron-pos-rad</output>
  </aerosurface_scale>

  <aerosurface_scale name="Right Aileron Control">
      <input>fcs/roll-trim-sum</input>
      <range>
        <min> -0.35 </min>
        <max>  0.35 </max>
      </range>
      <output>fcs/right-aileron-pos-rad</output>
  </aerosurface_scale>

  <aerosurface_scale name="left aileron normalization">
      <input>fcs/left-aileron-pos-rad</input>
      <domain>
        <min> -0.35 </min>
        <max>  0.35 </max>
      </domain>
      <range>
        <min> -1 </min>
        <max>  1 </max>
      </range>
      <output>fcs/left-aileron-pos-norm</output>
  </aerosurface_scale>

  <aerosurface_scale name="right aileron normalization">
      <input>fcs/right-aileron-pos-rad</input>
      <domain>
        <min> -0.35 </min>
        <max>  0.35 </max>
      </domain>
      <range>
        <min> -1 </min>
        <max>  1 </max>
      </range>
      <output>fcs/right-aileron-pos-norm</output>
  </aerosurface_scale>

  </channel>

  <channel name="Yaw">

  <summer name="Rudder Command Sum">
      <input>fcs/rudder-cmd-norm</input>
      <input>fcs/yaw-trim-cmd-norm</input>
      <clipto>
        <min> -1 </min>
        <max>  1 </max>
      </clipto>
  </summer>

  <aerosurface_scale name="Rudder Control">
      <input>fcs/rudder-command-sum</input>
      <range>
        <min> -0.35 </min>
        <max>  0.35 </max>
      </range>
      <output>fcs/rudder-pos-rad</output>
  </aerosurface_scale>

  <aerosurface_scale name="rudder normalization">
      <input>fcs/rudder-pos-rad</input>
      <domain>
        <min> -0.35 </min>
        <max>  0.35 </max>
      </domain>
      <range>
        <min> -1 </min>
        <max>  1 </max>
      </range>
      <output>fcs/rudder-pos-norm</output>
  </aerosurface_scale>

  </channel>

  <channel name="Flaps">
  <kinematic name="Flaps Control">
    <input>fcs/flap-cmd-norm</input>
    <traverse>
      <setting>
          <position> -5 </position>
          <time>    0.9 </time>
      </setting>
      <setting>
          <position>  0 </position>
          <time>    0.9 </time>
      </setting>
      <setting>
          <position>  9 </position>
          <time>    0.9 </time>
      </setting>
      <setting>
          <position> 19 </position>
          <time>    0.9 </time>
      </setting>
    </traverse>
    <output>fcs/flap-pos-deg</output>
  </kinematic>

  <aerosurface_scale name="flap normalization">
      <input>fcs/flap-pos-deg</input>
      <domain>
        <min> -5 </min>
        <max> 19 </max>
      </domain>
      <range>
        <min> 0 </min>
        <max> 1 </max>
      </range>
      <output>fcs/flap-pos-norm</output>
  </aerosurface_scale>

  </channel>

  <channel name="Landing Gear">
  </channel>

  <channel name="Spoiler">
  <kinematic name="Spoiler Control">
    <input>fcs/spoiler-cmd-norm</input>
    <traverse>
      <setting>
          <position> 0 </position>
          <time>     0 </time>
      </setting>
      <setting>
          <position> 1 </position>
          <time>     1 </time>
      </setting>
    </traverse>
    <output>fcs/spoiler-pos-norm</output>
  </kinematic>

  </channel>

</flight_control>

<aerodynamics>

  <axis name="LIFT">

    <function name="aero/force/Lift_alpha">
      <description>Lift due to alpha</description>
      <product>
          <property>aero/qbar-psf</property>
          <property>metrics/Sw-sqft</property>
          <table>
            <independentVar lookup="row">aero/alpha-rad</independentVar>
            <tableData>
              -0.20 -0.750
              0.00  0.250
              0.23  1.400
              0.60  0.710
            </tableData>
          </table>
      </product>
    </function>

    <function name="aero/force/Lift_flap">
      <description>Delta Lift due to flaps</description>
      <product>
          <property>aero/qbar-psf</property>
          <property>metrics/Sw-sqft</property>
          <property>fcs/flap-pos-deg</property>
          <value> 0.01333 </value>
      </product>
    </function>

    <function name="aero/force/Lift_spoiler">
      <description>Delta Lift due to spoiler</description>
      <product>
          <property>aero/qbar-psf</property>
          <property>metrics/Sw-sqft</property>
          <property>fcs/spoiler-pos-norm</property>
          <value>-0.05</value> <!--TODO make more accurate-->
      </product>
    </function>

    <function name="aero/force/Lift_elevator">
      <description>Lift due to Elevator Deflection</description>
      <product>
          <property>aero/qbar-psf</property>
          <property>metrics/Sw-sqft</property>
          <property>fcs/elevator-pos-rad</property>
          <value>0.2</value>
      </product>
    </function>

  </axis>

  <axis name="DRAG">

    <function name="aero/force/Drag_basic">
      <description>Drag at zero lift</description>
      <product>
          <property>aero/qbar-psf</property>
          <property>metrics/Sw-sqft</property>
          <table>
            <independentVar lookup="row">aero/alpha-rad</independentVar>
            <tableData>
             -1.57    1.500
             -0.26    0.016
              0.00    0.012
              0.26    0.016
              1.57    1.500
            </tableData>
          </table>
      </product>
    </function>

    <function name="aero/force/Drag_induced">
      <description>Induced drag</description>
        <product>
          <property>aero/qbar-psf</property>
          <property>metrics/Sw-sqft</property>
          <property>aero/cl-squared</property>
          <value>0.023</value>
        </product>
    </function>

    <function name="aero/force/Drag_mach">
      <description>Drag due to mach</description>
        <product>
          <property>aero/qbar-psf</property>
          <property>metrics/Sw-sqft</property>
          <table>
            <independentVar lookup="row">velocities/mach</independentVar>
            <tableData>
                0.00      0.000
                0.7      0.000
                1.10      0.023
                1.80      0.015
            </tableData>
          </table>
        </product>
    </function>

    <function name="aero/force/Drag_flap">
      <description>Drag due to flaps</description>
        <product>
          <property>aero/qbar-psf</property>
          <property>metrics/Sw-sqft</property>
          <property>fcs/flap-pos-deg</property>
          <value> 0.00100 </value>
        </product>
    </function>

    <function name="aero/force/Drag_spoiler">
      <description>Drag due to spoilers</description>
        <product>
          <property>aero/qbar-psf</property>
          <property>metrics/Sw-sqft</property>
          <property>fcs/spoiler-pos-norm</property>
          <value>0.028</value>
        </product>
    </function>

    <function name="aero/force/Drag_beta">
      <description>Drag due to sideslip</description>
      <product>
          <property>aero/qbar-psf</property>
          <property>metrics/Sw-sqft</property>
          <table>
            <independentVar lookup="row">aero/beta-rad</independentVar>
            <tableData>
              -1.57    1.230
              -0.26    0.050
              0.00    0.000
              0.26    0.050
              1.57    1.230
            </tableData>
          </table>
      </product>
    </function>

    <function name="aero/force/Drag_elevator">
      <description>Drag due to Elevator Deflection</description>
      <product>
          <property>aero/qbar-psf</property>
          <property>metrics/Sw-sqft</property>
          <abs><property>fcs/elevator-pos-norm</property></abs>
          <value>0.04</value>
      </product>
    </function>

  </axis>

  <axis name="SIDE">

    <function name="aero/force/Side_beta">
      <description>Side force due to beta</description>
      <product>
          <property>aero/qbar-psf</property>
          <property>metrics/Sw-sqft</property>
          <property>aero/beta-rad</property>
          <value>-1</value>
      </product>
    </function>

  </axis>

  <axis name="ROLL"><!-- TODO make roll rate accurate -->

    <function name="aero/moment/Roll_beta">
      <description>Roll moment due to beta</description>
      <product>
          <property>aero/qbar-psf</property>
          <property>metrics/Sw-sqft</property>
          <property>metrics/bw-ft</property>
          <property>aero/beta-rad</property>
          <value>-0.1</value>
      </product>
    </function>

    <function name="aero/moment/Roll_damp">
      <description>Roll moment due to roll rate</description>
      <product>
          <property>aero/qbar-psf</property>
          <property>metrics/Sw-sqft</property>
          <property>metrics/bw-ft</property>
          <property>aero/bi2vel</property>
          <property>velocities/p-aero-rad_sec</property>
          <value>-0.4</value>
      </product>
    </function>

    <function name="aero/moment/Roll_yaw">
      <description>Roll moment due to yaw rate</description>
      <product>
          <property>aero/qbar-psf</property>
          <property>metrics/Sw-sqft</property>
          <property>metrics/bw-ft</property>
          <property>aero/bi2vel</property>
          <property>velocities/r-aero-rad_sec</property>
          <value>0.15</value>
      </product>
    </function>

    <function name="aero/moment/Roll_aileron">
      <description>Roll moment due to aileron</description>
      <product>
          <property>aero/qbar-psf</property>
          <property>metrics/Sw-sqft</property>
          <property>metrics/bw-ft</property>
          <property>fcs/left-aileron-pos-rad</property>
          <value>0.17</value>
      </product>
    </function>

    <function name="aero/moment/Roll_rudder">
      <description>Roll moment due to rudder</description>
      <product>
          <property>aero/qbar-psf</property>
          <property>metrics/Sw-sqft</property>
          <property>metrics/bw-ft</property>
          <property>fcs/rudder-pos-rad</property>
          <value>0.01</value>
      </product>
    </function>

  </axis>

  <axis name="PITCH">

    <function name="aero/moment/Pitch_alpha">
      <description>Pitch moment due to alpha</description>
      <product>
          <property>aero/qbar-psf</property>
          <property>metrics/Sw-sqft</property>
          <property>metrics/cbarw-ft</property>
          <property>aero/alpha-rad</property>
          <value>-0.5</value>
      </product>
    </function>

    <function name="aero/moment/Pitch_elevator">
      <description>Pitch moment due to elevator</description>
      <product>
          <property>aero/qbar-psf</property>
          <property>metrics/Sw-sqft</property>
          <property>metrics/cbarw-ft</property>
          <property>fcs/elevator-pos-rad</property>
          <table>
            <independentVar lookup="row">velocities/mach</independentVar>
            <tableData>
              0.0     -1.100
              2.0     -0.275
            </tableData>
          </table>
      </product>
    </function>

    <function name="aero/moment/Pitch_damp">
      <description>Pitch moment due to pitch rate</description>
      <product>
          <property>aero/qbar-psf</property>
          <property>metrics/Sw-sqft</property>
          <property>metrics/cbarw-ft</property>
          <property>aero/ci2vel</property>
          <property>velocities/q-aero-rad_sec</property>
          <value>-12</value>
      </product>
    </function>

    <function name="aero/moment/Pitch_alphadot">
      <description>Pitch moment due to alpha rate</description>
      <product>
          <property>aero/qbar-psf</property>
          <property>metrics/Sw-sqft</property>
          <property>metrics/cbarw-ft</property>
          <property>aero/ci2vel</property>
          <property>aero/alphadot-rad_sec</property>
          <value>-7</value>
      </product>
    </function>

  </axis>

  <axis name="YAW">

    <function name="aero/moment/Yaw_beta">
      <description>Yaw moment due to beta</description>
      <product>
          <property>aero/qbar-psf</property>
          <property>metrics/Sw-sqft</property>
          <property>metrics/bw-ft</property>
          <property>aero/beta-rad</property>
          <value>0.12</value>
      </product>
    </function>

    <function name="aero/moment/Yaw_damp">
      <description>Yaw moment due to yaw rate</description>
      <product>
          <property>aero/qbar-psf</property>
          <property>metrics/Sw-sqft</property>
          <property>metrics/bw-ft</property>
          <property>aero/bi2vel</property>
          <property>velocities/r-aero-rad_sec</property>
          <value>-0.15</value>
      </product>
    </function>

    <function name="aero/moment/Yaw_rudder">
      <description>Yaw moment due to rudder</description>
      <product>
          <property>aero/qbar-psf</property>
          <property>metrics/Sw-sqft</property>
          <property>metrics/bw-ft</property>
          <property>fcs/rudder-pos-rad</property>
          <value>-0.1</value>
      </product>
    </function>

    <function name="aero/moment/Yaw_aileron">
      <description>Adverse yaw</description>
      <product>
          <property>aero/qbar-psf</property>
          <property>metrics/Sw-sqft</property>
          <property>metrics/bw-ft</property>
          <property>fcs/left-aileron-pos-rad</property>
          <value>-0.01</value>
      </product>
    </function>

  </axis>

</aerodynamics>

<external_reactions>
</external_reactions>

</fdm_config>
